p := 4
m_кл := 0.063  # кг
delta := p - 2 = 2
m_гк := 0.0066  # кг  # гидрокомпенсатор
q := p + delta = 6
m_кул := 0.042  # кг
r := q + delta = 8
s := r + delta = 10
# , м - максимальных ход клапана
h_max := 0.011
# , рад - рабочий угол кулачка
Φ := π*84/180 = 1.46608
n := 4000  # об/мин
k := 1.6
ω_p := π*n/60 = 209.44  # , рад/c - частота вращения ГРМ
C_2 := -p*q*r*s/((p - 2)*(q - 2)*(r - 2)*(s - 2)) = -5
C_p := 2*q*r*s/((p - 2)*(q - p)*(r - p)*(s - p)) = 10
C_q := 2*p*r*s/((q - 2)*(p - q)*(r - q)*(s - q)) = -10
C_r := 2*p*q*s/((r - 2)*(p - r)*(q - r)*(s - r)) = 5
C_s := 2*p*q*r/((s - 2)*(p - s)*(q - s)*(r - s)) = -1
h(φ) := h_max*(1 + C_2*(φ/Φ)^2 + C_p*(φ/Φ)^p + C_q*(φ/Φ)^q + C_r*(φ/Φ)^r + C_s*(φ/Φ)^s)
P_j(φ) := -m_м.г.*i(φ)  # error: Эта переменная не определена.
i(φ) := h_max*ω_p^2/Φ^2*(2*C_2 + p*(p - 1)*C_p*(φ/Φ)^(p - 2) + q*(q - 1)*C_q*(φ/Φ)^(q - 2) + r*(r - 1)*C_r*(φ/Φ)^(r - 2) + s*(s - 1)*C_s*(φ/Φ)^(s - 2))
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φ_max := -Φ/2 = -0.733038
Maximize(i, φ_max) = -0.84644
j_max := i(-0.846) = 1330.31
m_м.г. := m_кл + m_гк + m_кул = 0.1116  # кг
P_jmax := -m_м.г.*j_max = -148.462  # H
P_п := -k*P_jmax = 237.54  # H
δ := 6*10^-3
c := 4
i_п := 6
m := 1
G := 80*10^9
i_0п := 2
Δ := 0.2*10^-3
ρ := 7800
d_ср := c*δ = 0.024
χ := 1 + 1.45/c = 1.3625
M_k := P_п*d_ср/2 = 2.85048
τ_max := 8*χ*d_ср*P_п/(π*δ^3) = 91573626
τ_max/10^6 = 91.5736  # <350-600МПА
f := 8*P_п*d_ср^3*i_п/(m*G*δ^4) = 0.00152025
n_c := 9.55*δ/(i_п*d_ср^2)*(m*G/(2*ρ))^0.5 = 37546
n_c/n = 9.3865  # > 8
L_св := (i_п + i_0п)*δ + f + i_п*Δ = 0.0507203
L_сж := L_св - f = 0.0492
ε_mτ := 0.994
ε_nτ := 0.99
k_τ := 1.2
τ_1 := 400*10^6  # Па
n_τ := τ_1/(τ_max*k_τ/(ε_mτ*ε_nτ)) = 3.58204
